** E: etichetta valida P con tre campi in piu'. Controllo dell'esperimento D:
** se questo passa, D falliva per l'etichetta, non per il numero di campi.
*INCLUDE, INPUT=cubo.inc
*BOUNDARY
FISSI, 1, 3
*STEP
*STATIC
*DSLOAD
SOPRA, P, 1.0, 0.0, 0.0, 1.0
*NODE PRINT, NSET=LIBERI
U
*NODE PRINT, NSET=FISSI, TOTALS=ONLY
RF
*END STEP
