** I: P su SOPRA e TRVEC su LATO nello stesso passo, superfici diverse.
** La domanda di coesistenza. Confronto con h-p-due-superfici.inp.
*INCLUDE, INPUT=cubo.inc
*BOUNDARY
FISSI, 1, 3
*STEP
*STATIC
*DSLOAD
SOPRA, P, 1.0
LATO, TRVEC, 2.0, 0.0, 1.0, 0.0
*NODE PRINT, NSET=FISSI, TOTALS=ONLY
RF
*END STEP
