** J: ingresso degenere. Superficie nominata che non esiste, etichetta valida.
** Oracolo: ccx deve protestare, non applicare zero in silenzio.
*INCLUDE, INPUT=cubo.inc
*BOUNDARY
FISSI, 1, 3
*STEP
*STATIC
*DSLOAD
NONESISTE, P, 1.0
*NODE PRINT, NSET=FISSI, TOTALS=ONLY
RF
*END STEP
